Empty Project
0.0                          | Mach
0     0     0.0              | iYsym  iZsym  Zsym

  49.780      4.524     12.629  | Sref   Cref   Bref
 0.00   0.00   0.00          | Xref   Yref   Zref
 0.00                        | CDp  (optional)


#=================================================
SURFACE                      | (keyword)
50 seakite VF
#Nchord    Cspace   [ Nspan Sspace ]
 10        1.0

INDEX                        | (keyword)
111                          | Lsurf

YDUPLICATE
0.0

SCALE
1.0  1.0  1.0

TRANSLATE
0.0  0.0  0.0

ANGLE
0.0                          | dAinc

#__________________________________
SECTION                                          |  (keyword)
   0.0000    0.2349    0.0000    4.5226  0.8000    3    0   | Xle Yle Zle   Chord Ainc   [ Nspan Sspace ]

AFIL 0.0 1.0
C:\Users\CorentinTran\Nextcloud\01-PRODUIT\SK-SeaKite\S-Shipping\1-Conception, calculs, nomenclature\K-Kite\M - Modèles\1 - Aerodynamique\Aero 3D\SPexport\test_cases\Seakite50_VH\profiles\prof_1.dat

#______________
SECTION                                          |  (keyword)
   0.0084    0.7045   -0.0142    4.5075  0.8000    3    0   | Xle Yle Zle   Chord Ainc   [ Nspan Sspace ]

AFIL 0.0 1.0
C:\Users\CorentinTran\Nextcloud\01-PRODUIT\SK-SeaKite\S-Shipping\1-Conception, calculs, nomenclature\K-Kite\M - Modèles\1 - Aerodynamique\Aero 3D\SPexport\test_cases\Seakite50_VH\profiles\prof_2.dat

#______________
SECTION                                          |  (keyword)
   0.0378    1.4040   -0.0633    4.4556  0.8000    3    0   | Xle Yle Zle   Chord Ainc   [ Nspan Sspace ]

AFIL 0.0 1.0
C:\Users\CorentinTran\Nextcloud\01-PRODUIT\SK-SeaKite\S-Shipping\1-Conception, calculs, nomenclature\K-Kite\M - Modèles\1 - Aerodynamique\Aero 3D\SPexport\test_cases\Seakite50_VH\profiles\prof_3.dat

#______________
SECTION                                          |  (keyword)
   0.0803    2.1016   -0.1349    4.3756  0.8000    3    0   | Xle Yle Zle   Chord Ainc   [ Nspan Sspace ]

AFIL 0.0 1.0
C:\Users\CorentinTran\Nextcloud\01-PRODUIT\SK-SeaKite\S-Shipping\1-Conception, calculs, nomenclature\K-Kite\M - Modèles\1 - Aerodynamique\Aero 3D\SPexport\test_cases\Seakite50_VH\profiles\prof_4.dat

#______________
SECTION                                          |  (keyword)
   0.1538    2.7918   -0.2591    4.2496  1.0000    3    0   | Xle Yle Zle   Chord Ainc   [ Nspan Sspace ]

AFIL 0.0 1.0
C:\Users\CorentinTran\Nextcloud\01-PRODUIT\SK-SeaKite\S-Shipping\1-Conception, calculs, nomenclature\K-Kite\M - Modèles\1 - Aerodynamique\Aero 3D\SPexport\test_cases\Seakite50_VH\profiles\prof_5.dat

#______________
SECTION                                          |  (keyword)
   0.2668    3.4667   -0.4496    4.0689  0.8000    3    0   | Xle Yle Zle   Chord Ainc   [ Nspan Sspace ]

AFIL 0.0 1.0
C:\Users\CorentinTran\Nextcloud\01-PRODUIT\SK-SeaKite\S-Shipping\1-Conception, calculs, nomenclature\K-Kite\M - Modèles\1 - Aerodynamique\Aero 3D\SPexport\test_cases\Seakite50_VH\profiles\prof_6.dat

#______________
SECTION                                          |  (keyword)
   0.4292    4.1143   -0.7185    3.8238  1.2000    3    0   | Xle Yle Zle   Chord Ainc   [ Nspan Sspace ]

AFIL 0.0 1.0
C:\Users\CorentinTran\Nextcloud\01-PRODUIT\SK-SeaKite\S-Shipping\1-Conception, calculs, nomenclature\K-Kite\M - Modèles\1 - Aerodynamique\Aero 3D\SPexport\test_cases\Seakite50_VH\profiles\prof_7.dat

#______________
SECTION                                          |  (keyword)
   0.6333    4.7294   -1.0551    3.5216  1.2941    3    0   | Xle Yle Zle   Chord Ainc   [ Nspan Sspace ]

AFIL 0.0 1.0
C:\Users\CorentinTran\Nextcloud\01-PRODUIT\SK-SeaKite\S-Shipping\1-Conception, calculs, nomenclature\K-Kite\M - Modèles\1 - Aerodynamique\Aero 3D\SPexport\test_cases\Seakite50_VH\profiles\prof_8.dat

#______________
SECTION                                          |  (keyword)
   1.0715    5.3262   -1.4234    2.9701  1.9000    3    0   | Xle Yle Zle   Chord Ainc   [ Nspan Sspace ]

AFIL 0.0 1.0
C:\Users\CorentinTran\Nextcloud\01-PRODUIT\SK-SeaKite\S-Shipping\1-Conception, calculs, nomenclature\K-Kite\M - Modèles\1 - Aerodynamique\Aero 3D\SPexport\test_cases\Seakite50_VH\profiles\prof_9.dat

#______________
SECTION                                          |  (keyword)
   1.4423    5.9010   -1.8250    2.4704  2.0000    3    0   | Xle Yle Zle   Chord Ainc   [ Nspan Sspace ]

AFIL 0.0 1.0
C:\Users\CorentinTran\Nextcloud\01-PRODUIT\SK-SeaKite\S-Shipping\1-Conception, calculs, nomenclature\K-Kite\M - Modèles\1 - Aerodynamique\Aero 3D\SPexport\test_cases\Seakite50_VH\profiles\prof_10.dat

#______________
